*Heading
** Job name: Job-11 Model name: Model-1
** Generated by: Abaqus/CAE 2016
*Preprint, echo=NO, model=NO, history=NO, contact=NO
**
** PARTS
**
*Part, name=Part-1
*Node
      1,          10.,        13.75,    17.320509
      2,          10.,       18.125,    17.320509
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*Element, type=C3D8R
 1, 19, 20, 23, 22,  1,  2,  5,  4
 2, 20, 21, 24, 23,  2,  3,  6,  5
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*Nset, nset=_PickedSet8, internal, generate
  1,  36,   1
*Elset, elset=_PickedSet8, internal, generate
  1,  10,   1
** Section: Section-1
*Solid Section, elset=_PickedSet8, material=Material-1
,
*End Part
**
**
** ASSEMBLY
**
*Assembly, name=Assembly
**
*Instance, name=Part-1-1, part=Part-1
*End Instance
**
*Nset, nset=A1, instance=Part-1-1
 3,
*Nset, nset=A2, instance=Part-1-1
 2,
*Nset, nset=A3, instance=Part-1-1
 1,
*Nset, nset=A4, instance=Part-1-1
 21,
*Nset, nset=A5, instance=Part-1-1
 20,
*Nset, nset=A6, instance=Part-1-1
 19,
*Nset, nset=B1, instance=Part-1-1
 18,
*Nset, nset=B2, instance=Part-1-1
 17,
*Nset, nset=B3, instance=Part-1-1
 16,
*Nset, nset=B4, instance=Part-1-1
 36,
*Nset, nset=B5, instance=Part-1-1
 35,
*Nset, nset=B6, instance=Part-1-1
 34,
*Nset, nset=_PickedSet18, internal, instance=Part-1-1
 16, 18
*Nset, nset="_T-Datum csys-2", internal
_PickedSet18,
A1,
B1,
A2,
B2,
*Transform, nset="_T-Datum csys-2", type=C
          0.,         17.5,           0.,           0.,         16.5,           0.
** Constraint: Constraint-1
*Equation
2
A1, 1, 1.
B1, 1, -1.
** Constraint: Constraint-2
*Equation
2
A1, 2, 1.
B1, 2, -1.
** Constraint: Constraint-3
*Equation
2
A1, 3, 1.
B1, 3, -1.
** Constraint: Constraint-4
*Equation
2
A2, 1, 1.
B2, 1, -1.
*End Assembly
**
** MATERIALS
**
*Material, name=Material-1
*Density
1.,
*Elastic
200., 0.3
** ----------------------------------------------------------------
**
** STEP: Step-1
**
*Step, name=Step-1, nlgeom=YES
*Dynamic, Explicit
, 1.
*Bulk Viscosity
0.06, 1.2
**
** LOADS
**
** Name: Load-1   Type: Concentrated force
*Cload
_PickedSet18, 1, 123.
**
** OUTPUT REQUESTS
**
*Restart, write, number interval=1, time marks=NO
**
** FIELD OUTPUT: F-Output-1
**
*Output, field, variable=PRESELECT
**
** HISTORY OUTPUT: H-Output-1
**
*Output, history, variable=PRESELECT
*End Step
